*Heading
** Job name: Step-1 Model name: Model-1
** Generated by: Abaqus/CAE 2022
*Preprint, echo=NO, model=NO, history=NO, contact=NO
**
** PARTS
**
*Part, name=Part-1
*Node
      1,   10.6066017,   10.6066017,           0.
      2,           0.,          15.,           0.
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*Element, type=C3D8R
   1,   95,  466, 1258,  448,    1,   22,  286,   57
   2,  466,  467, 1259, 1258,   22,   23,  287,  286
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*Nset, nset=Mater_Assign, generate
    1,  1986,     1
*Elset, elset=Mater_Assign, generate
    1,  1500,     1
*Elset, elset=_FCsurface_S2, internal, generate
 1201,  1300,     1
*Elset, elset=_FCsurface_S3, internal
  901,  902,  903,  904,  905,  906
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*Elset, elset=_FCsurface_S4, internal, generate
 603,  900,    3
*Surface, type=ELEMENT, name=FCsurface
_FCsurface_S2, S2
_FCsurface_S3, S3
_FCsurface_S4, S4
** Section: Section-1
*Solid Section, elset=Mater_Assign, material=Material-1
,
*End Part
**
**
** ASSEMBLY
**
*Assembly, name=Assembly
**
*Instance, name=Part-1-1, part=Part-1
*End Instance
**
*Node
      1,           0.,           0.,           0.
*Nset, nset=FC
 1,
*Nset, nset=allnodes, instance=Part-1-1, generate
    1,  1986,     1
*Nset, nset=_PickedSet9, internal, instance=Part-1-1
    2,    3,    6,    7,    9,   11
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*Elset, elset=_PickedSet9, internal, instance=Part-1-1
  10,  20,  30,  40,  50,  60
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*Nset, nset=_PickedSet10, internal, instance=Part-1-1
    9,   10,   11,   12,   13,   14
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*Elset, elset=_PickedSet10, internal, instance=Part-1-1
  210,  220,  230,  240,  250,  260
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*Nset, nset=_PickedSet11, internal, instance=Part-1-1
    1,    2,    5,    6,   13,   14
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*Elset, elset=_PickedSet11, internal, instance=Part-1-1
    1,    2,    3,    4,    5,    6
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*End Assembly
**
** MATERIALS
**
*Material, name=Material-1
*Density
 1e-09,
*Elastic
200., 0.3
**
** INTERACTION PROPERTIES
**
*Fluid Behavior, name=IntProp-1
*Fluid Density
1e-09
*Fluid Bulk Modulus
2000.,
**
** BOUNDARY CONDITIONS
**
** Name: BC-2 Type: Symmetry/Antisymmetry/Encastre
*Boundary
_PickedSet9, XSYMM
** Name: BC-3 Type: Symmetry/Antisymmetry/Encastre
*Boundary
_PickedSet10, YSYMM
** Name: BC-4 Type: Symmetry/Antisymmetry/Encastre
*Boundary
_PickedSet11, ZSYMM
**
** PREDEFINED FIELDS
**
** Name: FC-pressure   Type: Fluid cavity pressure
*Initial Conditions, type=FLUID PRESSURE
FC, 1.
**
** INTERACTIONS
**
** Interaction: FC
*Fluid Cavity, name=FC, behavior=IntProp-1, refnode=FC, surface=Part-1-1.FCsurface

** ----------------------------------------------------------------
**
** STEP: Step-1
**
*Step, name=Step-1, nlgeom=YES
*Static
1., 1., 1e-05, 1.
**
** OUTPUT REQUESTS
**
*Restart, write, frequency=0
**
** FIELD OUTPUT: F-Output-1
**
*Output, field, variable=PRESELECT
**
** HISTORY OUTPUT: H-Output-2
**
*Output, history
*Node Output, nset=FC
CVOL, PCAV
**
** HISTORY OUTPUT: H-Output-1
**
*Output, history, variable=PRESELECT
*node print, nset=allnodes
U
*node print, nset=FC
PCAV
*End Step
