*Heading
** Job name: Step-3 Model name: Model-1
** Generated by: Abaqus/CAE 2022
*Preprint, echo=NO, model=NO, history=NO, contact=NO
**
** PARTS
**
*Part, name=Part-1
*Node
      1,          10.,          30.
      2,           9.,          30.
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*Element, type=CAX4R
  1,   1,   2,   8,   7
  2,   2,   3,   9,   8
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*Nset, nset=_PickedSet2, internal, generate
   1,  186,    1
*Elset, elset=_PickedSet2, internal, generate
   1,  150,    1
*Nset, nset=Set-1, generate
   7,  180,    1
** Section: Section-1
*Solid Section, elset=_PickedSet2, material=Material-1
,
*End Part
**
**
** ASSEMBLY
**
*Assembly, name=Assembly
**
*Instance, name=Part-1-1, part=Part-1
*End Instance
**
*Nset, nset=allnodes, instance=Part-1-1, generate
   7,  180,    1
*Nset, nset=_PickedSet4, internal, instance=Part-1-1
   1,   2,   3,   4,   5,   6, 181, 182, 183, 184, 185, 186
*Elset, elset=_PickedSet4, internal, instance=Part-1-1
   1,   2,   3,   4,   5, 146, 147, 148, 149, 150
*Elset, elset=__PickedSurf5_S2, internal, instance=Part-1-1, generate
   5,  150,    5
*Surface, type=ELEMENT, name=_PickedSurf5, internal
__PickedSurf5_S2, S2
*End Assembly
**
** MATERIALS
**
*Material, name=Material-1
*Elastic
100., 0.3
** ----------------------------------------------------------------
**
** STEP: Step-1
**
*Step, name=Step-1, nlgeom=YES
*Static
1., 1., 1e-05, 1.
**
** BOUNDARY CONDITIONS
**
** Name: BC-1 Type: Displacement/Rotation
*Boundary
_PickedSet4, 1, 1
_PickedSet4, 2, 2
**
** LOADS
**
** Name: Load-1   Type: Pressure
*Dsload
_PickedSurf5, P, 10.
**
** OUTPUT REQUESTS
**
*Restart, write, frequency=0
**
** FIELD OUTPUT: F-Output-1
**
*Output, field, variable=PRESELECT
**
** HISTORY OUTPUT: H-Output-1
**
*Output, history, variable=PRESELECT
*node print, nset=allnodes
U
*End Step
