*Heading
** Job name: Step-2 Model name: Step-2
** Generated by: Abaqus/CAE 2022
*Preprint, echo=NO, model=NO, history=NO, contact=NO
**
** PARTS
**
*Part, name=cylinder
*Node
      1,           0.,          15.,          30.
      2,           0.,          15.,           0.
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*Element, type=C3D8R
  1,  158, 1073, 3069, 1041,    1,   17,  433,   86
  2, 1073, 1074, 3070, 3069,   17,   18,  434,  433
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*Nset, nset=Set-1, generate
    1,  4284,     1
*Elset, elset=Set-1, generate
    1,  2720,     1
** Section: Section-1
*Solid Section, elset=Set-1, material=Material-1
,
*End Part
**
**
** ASSEMBLY
**
*Assembly, name=Assembly
**
*Instance, name=cylinder-1, part=cylinder
*End Instance
**
*Nset, nset=Set-1, instance=cylinder-1
    2,    3,    5,    6,    9,   12
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*Elset, elset=Set-1, instance=cylinder-1
   20,   40,   60,   80,  100,  120
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*Nset, nset=allnodes, instance=cylinder-1
   17,   18,   19,   20,   21,   22
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*Nset, nset=asymnode, instance=cylinder-1
    1,    4,    7,    8,   10,   11
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*Nset, nset=fixnode, instance=cylinder-1
    2,    3,    5,    6,    9,   12
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*Elset, elset=_Surf-1_S2, internal, instance=cylinder-1
    1,    2,    3,    4,    5,    6
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*Surface, type=ELEMENT, name=Surf-1
_Surf-1_S2, S2
*End Assembly
*Amplitude, name=Amp-1
             0.,              0.,              1.,              1.
**
** MATERIALS
**
*Material, name=Material-1
*Elastic
1., 0.35
**
** BOUNDARY CONDITIONS
**
** Name: BC-1 Type: Symmetry/Antisymmetry/Encastre
*Boundary
fixnode, ENCASTRE
** Name: BC-2 Type: Symmetry/Antisymmetry/Encastre
*Boundary
asymnode, ENCASTRE
** ----------------------------------------------------------------
**
** STEP: Step-1
**
*Step, name=Step-1, nlgeom=NO, inc=1000
*Static
1., 1., 1e-10, 1.
**
** BOUNDARY CONDITIONS
**
** Name: BC-3 Type: Displacement/Rotation
*Boundary, user
allnodes, 1, 1, 1.
allnodes, 2, 2, 1.
allnodes, 3, 3, 1.
**
** OUTPUT REQUESTS
**
*Restart, write, frequency=0
**
** FIELD OUTPUT: F-Output-1
**
*Output, field, variable=PRESELECT
**
** HISTORY OUTPUT: H-Output-1
**
*Output, history, variable=PRESELECT
*End Step
